*NODE, nset=nall
         1,  0.0            ,  0.020919       ,  -0.010131
         2,  0.0            ,  0.0209190003281,  2.4414779995644
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*ELEMENT,TYPE=C3D8
     1,     74,    118,    117,     73,     78,    120,    119,     77
     2,     70,    116,    115,     69,     74,    118,    117,     73
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*ELEMENT,TYPE=C3D8
     21,    20,     13,     12,     21,     97,    100,     99,     98
     22,    36,     37,     94,     93,     40,     41,     96,     95
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*ELSET, ELSET=EB101
1,2,3,28,29,30
*ELSET, ELSET=EB102
7,8,9,13,14,15,16,17,18,19,20,21
*ELSET, ELSET=EB103
4,5,6,22,23,24,31,32,33,34,35,36,40,41,42
*ELSET, ELSET=EB104
10,11,12,25,26,27,37,38,39
*ELSET, ELSET=AQELSET01
1,2,3
*ELSET, ELSET=AQELSET02
25,26,27
*Surface, type=ELEMENT, name=SS201
AQELSET01, S4
*Surface, type=NODE, name=SS202
AQELSET02, S5
*Material, name=Material-1
*Density
7.6e-12
*Elastic, type=isotropic
210e3, 0.25
*Material, name=Material-2
*Density
7.6e-12
*Elastic, type=isotropic
210e3, 0.25
*Material, name=Material-3
*Density
7.6e-12
*Elastic, type=isotropic
210e3, 0.25
*Material, name=Material-4
*Density
7.6e-12
*Elastic, type=isotropic
210e3, 0.25
*SOLID SECTION, ELSET=EB101, MATERIAL=Material-1
*SOLID SECTION, ELSET=EB102, MATERIAL=Material-1
*SOLID SECTION, ELSET=EB103, MATERIAL=Material-3
*SOLID SECTION, ELSET=EB104, MATERIAL=Material-4
*End
