*NODE, nset=nall
         1,  0.0            ,  0.020919       ,  -0.010131
         2,  0.0            ,  0.0209190003281,  2.4414779995644
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*ELEMENT,TYPE=C3D8, elset=EB20
     1,     74,    118,    117,     73,     78,    120,    119,     77
     2,     70,    116,    115,     69,     74,    118,    117,     73
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*ELEMENT,TYPE=C3D8, elset=EB21
     21,    20,     13,     12,     21,     97,    100,     99,     98
     22,    36,     37,     94,     93,     40,     41,     96,     95
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*ELEMENT,TYPE=C3D6, elset=EB23
     28,    71,     74,     73,     75,     78,     77
     43,    71,     73,     72,     65,     77,     70
*NSET, NSET=nodeset1
1,2,3,4
*ELSET, ELSET=EB22
35, 40
*ELSET, ELSET=AQELSET01
30, 31, 32, 34, 35
*ELSET, ELSET=AQELSET02
20, 21, 22
*Surface, type=ELEMENT, name=SS101
AQELSET01, S1
*Surface, type=NODE, name=SS102
AQELSET02, S1
*Material, name=77
*Density
7.6e-12
*Elastic, type=isotropic
210e3, 0.25
*Material, name=22
*Density
7.6e-12
*Elastic, type=isotropic
210e3, 0.25
*SOLID SECTION, ELSET=EB20, MATERIAL=77
*SOLID SECTION, ELSET=EB21, MATERIAL=22
*SOLID SECTION, ELSET=EB23, MATERIAL=22
*End
