*NODE, nset=nall
         1,  0.0            ,  0.020919       ,  -0.010131
         2,  0.0            ,  0.0209190003281,  2.4414779995644
         3,  0.0            ,  2.1222986674148,  4.02399833234
         4,  0.0            ,  4.2236783345015,  5.6065186651155
         5,  0.0            ,  6.3250579998446,  7.1890390014787
         6,  0.0            ,  9.0646343998492,  7.4770060014342
         7,  0.0            ,  11.804210799854,  7.7649730013898
         8,  0.0            ,  14.543787199859,  8.0529400013454
         9,  0.0            ,  17.283363599863,  8.3409070013009
        10,  0.0            ,  20.022940001371,  8.6288740056872
        11,  0.0            ,  23.058266001609,  7.8972824066751
        12,  0.0            ,  26.093592001847,  7.165690807663
        13,  0.0            ,  29.128918002085,  6.4340992086509
        14,  0.0            ,  32.164244002323,  5.7025076096388
        15,  0.0            ,  35.199569999802,  4.9709160000138
        16,  0.0            ,  34.927170005027,  1.0405580153264
        17,  0.0            ,  32.495015004611,  1.8383040140569
        18,  0.0            ,  30.062860005348,  2.6360499998592
        19,  0.0            ,  30.101777998926,  4.1147989953436
        20,  0.0            ,  27.572339999118,  4.6985154961759
        21,  0.0            ,  25.04290199931 ,  5.2822319970081
        22,  0.0            ,  22.513463999502,  5.8659484978404
        23,  0.0            ,  19.984025999751,  6.4496650028344
        24,  0.0            ,  17.322278399762,  6.2161782027165
        25,  0.0            ,  14.660530799772,  5.9826914025987
        26,  0.0            ,  11.998783199782,  5.7492046024808
        27,  0.0            ,  9.3370355997927,  5.515717802363
        28,  0.0            ,  6.6752880009846,  5.2822309987621
        29,  0.0            ,  4.4571650006564,  3.518110332508
        30,  0.0            ,  2.2390420003282,  1.753989666254
        31,  3.3333333333333,  19.984025999751,  6.4496650028344
        32,  3.3333333333333,  17.322278399882,  6.2161782020098
        33,  3.3333333333333,  17.283363600027,  8.3409070047364
        34,  3.3333333333333,  20.022940001371,  8.6288740056872
        35,  6.6666666666667,  19.984025999751,  6.4496650028344
        36,  6.6666666666667,  17.32227839994 ,  6.2161782020148
        37,  6.6666666666667,  17.283363600546,  8.3409070047909
        38,  6.6666666666667,  20.022940001371,  8.6288740056872
        39,  10.0           ,  19.984026      ,  6.449665
        40,  10.0           ,  17.322278400174,  6.2161782000152
        41,  10.0           ,  17.283363601558,  8.3409070001637
        42,  10.0           ,  20.02294       ,  8.628874
        43,  3.3333333333333,  6.3250579998446,  7.1890390014787
        44,  3.3333333333333,  6.6752880009846,  5.2822309987621
        45,  3.3333333333333,  4.4571650006564,  3.518110332508
        46,  3.3333333333333,  4.2236783330673,  5.6065186673026
        47,  6.6666666666667,  6.3250579998446,  7.1890390014787
        48,  6.6666666666667,  6.6752880009846,  5.2822309987621
        49,  6.6666666666667,  4.4571650006564,  3.518110332508
        50,  6.6666666666667,  4.2236783332032,  5.6065186674049
        51,  10.0           ,  6.325058       ,  7.189039
        52,  10.0           ,  6.675288       ,  5.282231
        53,  10.0           ,  4.457165       ,  3.5181103333333
        54,  10.0           ,  4.2236783337409,  5.6065186669736
        55,  3.3333333333333,  9.3370356002743,  5.5157177995359
        56,  3.3333333333333,  9.0646343998902,  7.4770060022931
        57,  3.3333333333333,  11.804210799936,  7.7649730031075
        58,  3.3333333333333,  11.998783200144,  5.7492046003605
        59,  6.6666666666667,  9.3370356005061,  5.5157177995562
        60,  6.6666666666667,  9.06463440002  ,  7.4770060023068
        61,  6.6666666666667,  11.804210800195,  7.7649730031348
        62,  6.6666666666667,  11.998783200317,  5.7492046003758
        63,  10.0           ,  9.3370356006954,  5.515717800061
        64,  10.0           ,  9.0646344003894,  7.4770060000409
        65,  10.0           ,  11.804210800779,  7.7649730000819
        66,  10.0           ,  11.998783200522,  5.7492046000458
        67,  3.3333333333333,  30.062860005348,  2.6360499998592
        68,  3.3333333333333,  30.101777998926,  4.1147989953436
        69,  3.3333333333333,  32.164244000217,  5.7025076011239
        70,  3.3333333333333,  32.495015003564,  1.8383040081253
        71,  6.6666666666667,  30.062860005348,  2.6360499998592
        72,  6.6666666666667,  30.101777998926,  4.1147989953436
        73,  6.6666666666667,  32.164244000166,  5.7025076011362
        74,  6.6666666666667,  32.495015004376,  1.8383040078591
        75,  10.0           ,  30.06286       ,  2.63605
        76,  10.0           ,  30.101778      ,  4.114799
        77,  10.0           ,  32.164243999848,  5.7025076000368
        78,  10.0           ,  32.495015002435,  1.8383039992013
        79,  3.3333333333333,  2.2390420003282,  1.753989666254
        80,  3.3333333333333,  0.020919       ,  -0.010131
        81,  3.3333333333333,  0.0209190003281,  2.4414779995644
        82,  3.3333333333333,  2.1222986666977,  4.0239983334335
        83,  6.6666666666667,  2.2390420003282,  1.753989666254
        84,  6.6666666666667,  0.020919       ,  -0.010131
        85,  6.6666666666667,  0.0209190003281,  2.4414779995644
        86,  6.6666666666667,  2.1222986667656,  4.0239983334847
        87,  10.0           ,  2.239042       ,  1.7539896666667
        88,  10.0           ,  0.020919       ,  -0.010131
        89,  10.0           ,  0.020919       ,  2.441478
        90,  10.0           ,  2.1222986668705,  4.0239983334868
        91,  3.3333333333333,  14.660530800013,  5.9826914011851
        92,  3.3333333333333,  14.543787199982,  8.052940003922
        93,  6.6666666666667,  14.660530800129,  5.9826914011953
        94,  6.6666666666667,  14.543787200371,  8.0529400039629
        95,  10.0           ,  14.660530800348,  5.9826914000305
        96,  10.0           ,  14.543787201168,  8.0529400001228
        97,  3.3333333333333,  27.572339999275,  4.6985154971834
        98,  3.3333333333333,  25.042901999624,  5.2822319990231
        99,  3.3333333333333,  26.093592000794,  7.1656908034056
       100,  3.3333333333333,  29.128918000506,  6.4340992022648
       101,  6.6666666666667,  27.572339999203,  4.6985154971998
       102,  6.6666666666667,  25.042901999481,  5.282231999056
       103,  6.6666666666667,  26.093592000768,  7.1656908034117
       104,  6.6666666666667,  29.128918000467,  6.434099202274
       105,  10.0           ,  27.572339999786,  4.6985155000494
       106,  10.0           ,  25.042901999572,  5.2822320000989
       107,  10.0           ,  26.093591999924,  7.1656908000184
       108,  10.0           ,  29.128917999886,  6.4340992000276
       109,  3.3333333333333,  22.513463999973,  5.8659485008628
       110,  3.3333333333333,  23.058266001082,  7.8972824045464
       111,  6.6666666666667,  22.513463999759,  5.8659485009122
       112,  6.6666666666667,  23.05826600107 ,  7.8972824045495
       113,  10.0           ,  22.513463999357,  5.8659485001483
       114,  10.0           ,  23.058265999962,  7.8972824000092
       115,  3.3333333333333,  35.199569999802,  4.9709160000138
       116,  3.3333333333333,  34.927170005027,  1.0405580153264
       117,  6.6666666666667,  35.199569999802,  4.9709160000138
       118,  6.6666666666667,  34.927170005027,  1.0405580153264
       119,  10.0           ,  35.19957       ,  4.970916
       120,  10.0           ,  34.92717       ,  1.040558
*ELEMENT,TYPE=C3D8, Elset=Elall
     1,     74,    118,    117,     73,     78,    120,    119,     77
     2,     70,    116,    115,     69,     74,    118,    117,     73
     3,     17,     16,     15,     14,     70,    116,    115,     69
     4,     93,     94,     61,     62,     95,     96,     65,     66
     5,     91,     92,     57,     58,     93,     94,     61,     62
     6,     25,      8,      7,     26,     91,     92,     57,     58
     7,    104,    101,     72,     73,    108,    105,     76,     77
     8,    100,     97,     68,     69,    104,    101,     72,     73
     9,     13,     20,     19,     14,    100,     97,     68,     69
     10,    49,     50,     86,     83,     53,     54,     90,     87
     11,    45,     46,     82,     79,     49,     50,     86,     83
     12,    29,      4,      3,     30,     45,     46,     82,     79
     13,   111,    112,     38,     35,    113,    114,     42,     39
     14,   109,    110,     34,     31,    111,    112,     38,     35
     15,    22,     11,     10,     23,    109,    110,     34,     31
     16,   102,    103,    112,    111,    106,    107,    114,    113
     17,    98,     99,    110,    109,    102,    103,    112,    111
     18,    21,     12,     11,     22,     98,     99,    110,    109
     19,   101,    104,    103,    102,    105,    108,    107,    106
     20,    97,    100,     99,     98,    101,    104,    103,    102
     21,    20,     13,     12,     21,     97,    100,     99,     98
     22,    36,     37,     94,     93,     40,     41,     96,     95
     23,    32,     33,     92,     91,     36,     37,     94,     93
     24,    24,      9,      8,     25,     32,     33,     92,     91
     25,    83,     86,     85,     84,     87,     90,     89,     88
     26,    79,     82,     81,     80,     83,     86,     85,     84
     27,    30,      3,      2,      1,     79,     82,     81,     80
     28,    71,     74,     73,     72,     75,     78,     77,     76
     29,    67,     70,     69,     68,     71,     74,     73,     72
     30,    18,     17,     14,     19,     67,     70,     69,     68
     31,    48,     59,     60,     47,     52,     63,     64,     51
     32,    44,     55,     56,     43,     48,     59,     60,     47
     33,    28,     27,      6,      5,     44,     55,     56,     43
     34,    59,     62,     61,     60,     63,     66,     65,     64
     35,    55,     58,     57,     56,     59,     62,     61,     60
     36,    27,     26,      7,      6,     55,     58,     57,     56
     37,    47,     50,     49,     48,     51,     54,     53,     52
     38,    43,     46,     45,     44,     47,     50,     49,     48
     39,     5,      4,     29,     28,     43,     46,     45,     44
     40,    35,     38,     37,     36,     39,     42,     41,     40
     41,    31,     34,     33,     32,     35,     38,     37,     36
     42,    23,     10,      9,     24,     31,     34,     33,     32
*Material, name=Material-1
*Elastic, type=isotropic
210e3, 0.25
*SOLID SECTION, ELSET=Elall, MATERIAL=Material-1
*Step
*Static
*Boundary
1,  1, 3
88, 1, 3
16, 1, 3
*Boundary
120, 3, 3, 0.5
*El File
U
*end step
